OpenVSP model (file version 5), 22 components.
Geometry view with OpenVSP parameter names; values to 6 digits, angles in degrees, lengths in the model's unit.
Overall bounding box: X_Min=0 X_Len=126.124 Y_Min=-101.975 Y_Len=203.949 Z_Min=-9 Z_Len=42.1137

Wing "WingGeom"
  location (X Y Z) 45 0 4, rotation 0 0 0
  symmetric about XZ
  bounding box size 34.0129 203.949 6.26511
  totals: TotalSpan=204 TotalProjectedSpan=203.909 TotalChord=30.5 TotalArea=5886 TotalAR=7.064 RelativeTwistFlag=1
  root: chord 34, twist 1, NACA 4-series Camber=0.04 CamberLoc=0.4 ThickChord=0.17
  sections:
    n  Span  Root_Chord  Tip_Chord  Area  Sweep  Sweep_Location  Dihedral  Twist  Twist_Location  tip airfoil
    1  27    34          34         918   0      0               0         0      0.25            as above
    2  75    34          20         2025  0      0               2         0      0.25            NACA 4-series Camber=0.04 CamberLoc=0.4 ThickChord=0.12

Fuselage "FuselageGeom"
  location (X Y Z) 0 27 0, rotation 0 0 0
  symmetric about XZ
  bounding box size 120 72 18.1591
  Design: Length=120
  cross sections:
    n  XLocPercent  YLocPercent  YRotate  ZLocPercent  shape
    0  0            0            0        -0.00208333  point
    1  0.0625       0            12       -0.0208333   general fuselage BotStr=0 BotTanAngle=15 CornerRad=0 Height=11 LowStr=1 MaxWidthLoc=0.2 TopStr=1 TopTanAngle=90 UpStr=1 Width=13.5
    2  0.125        0            18       -0.0025      general fuselage BotStr=0 BotTanAngle=16 CornerRad=0 Height=18 LowStr=1 MaxWidthLoc=-0.4 TopStr=1 TopTanAngle=90 UpStr=2 Width=16.5
    3  0.25         0            0        0            general fuselage BotStr=0 BotTanAngle=12 CornerRad=0 Height=18 LowStr=1 MaxWidthLoc=-0.75 TopStr=1.5 TopTanAngle=90 UpStr=2 Width=18
    4  0.5          0            0        0            as above
    5  0.5          0            0        0.00833333   general fuselage BotStr=0 BotTanAngle=30 CornerRad=0 Height=16 LowStr=1 MaxWidthLoc=-0.5 TopStr=1 TopTanAngle=90 UpStr=2 Width=18
    6  0.75         0            -8       0.0258333    general fuselage BotStr=0 BotTanAngle=30 CornerRad=0 Height=12 LowStr=1 MaxWidthLoc=-0.5 TopStr=1 TopTanAngle=90 UpStr=2 Width=16
    7  1            0            -30      0.075        point

Wing "VTail"
  location (X Y Z) 77 27 8.5, rotation 0 0 0
  symmetric about XZ
  bounding box size 49.1238 58.5026 24.6137
  totals: TotalSpan=48 TotalProjectedSpan=1e-06 TotalChord=25.6667 TotalArea=1032 TotalAR=0
  root: chord 45, twist 0, NACA 4-series Camber=0 CamberLoc=0.2 ThickChord=0.1
  sections:
    n  Span  Root_Chord  Tip_Chord  Area   Sweep  Sweep_Location  Dihedral  Twist  Twist_Location  tip airfoil
    1  4     45          25         140    79     0               90        0      0.25            as above
    2  2     25          22.5       47.5   55     0               90        0      0.25            as above
    3  18    22.5        14         328.5  33     0               90        0      0.25            as above

Wing "HTail"
  location (X Y Z) 112 0 32, rotation 0 0 0
  symmetric about XZ
  bounding box size 14 54 1.9606
  totals: TotalSpan=54 TotalProjectedSpan=54 TotalChord=14 TotalArea=756 TotalAR=3.85714
  root: chord 14, twist 0, NACA 4-series Camber=0 CamberLoc=0.2 ThickChord=0.14
  sections:
    n  Span  Root_Chord  Tip_Chord  Area  Sweep  Sweep_Location  Dihedral  Twist  Twist_Location  tip airfoil
    1  27    14          14         378   0      0               0         0      0.25            as above

Wing "CenterFlap"
  location (X Y Z) 79 0 1.5, rotation 0 0 0
  symmetric about XZ
  bounding box size 5.44055 32 2.66671
  totals: TotalSpan=32 TotalProjectedSpan=32 TotalChord=6 TotalArea=192 TotalAR=5.33333 RelativeTwistFlag=1
  root: chord 6, twist 25, NACA 4-series Camber=0.04 CamberLoc=0.4 ThickChord=0.12
  sections:
    n  Span  Root_Chord  Tip_Chord  Area  Sweep  Sweep_Location  Dihedral  Twist  Twist_Location  tip airfoil
    1  16    6           6          96    0      0               0         0      0.25            as above

Wing "OutFlap"
  location (X Y Z) 77 40 2, rotation 0 0 0
  symmetric about XZ
  bounding box size 15.1596 179.951 4.41153
  totals: TotalSpan=100 TotalProjectedSpan=99.9391 TotalChord=6 TotalArea=600 TotalAR=16.6464 RelativeTwistFlag=1
  root: chord 6, twist 25, NACA 4-series Camber=0.04 CamberLoc=0.4 ThickChord=0.12
  sections:
    n  Span  Root_Chord  Tip_Chord  Area  Sweep  Sweep_Location  Dihedral  Twist  Twist_Location  tip airfoil
    1  50    6           6          300   -11    0               2         0      0.25            as above

Propeller "Prop1"
  location (X Y Z) 40 -87 5, rotation 0 0 0
  bounding box size 0.736693 13.5396 12.3587
  Design: Diameter=13.5 NumBlade=6 Beta34=-20 UseBeta34Flag=1 Feather=0 Rotate=0 Precone=0 ReverseFlag=0 FoldAngle=0 PropMode=0 AF=168.52 CLi=0.538798 Chord=0.196667 Solidity=0.375606 ConstructXoC=0.5 FeatherAxisXoC=0.5 FeatherOffsetXoC=0
  cross sections:
    n  RadiusFrac  shape
    0  0.2         ellipse Ellipse_Height=0.3375 Ellipse_Width=0.675
    1  0.4         ellipse Ellipse_Height=0.172619 Ellipse_Width=1.19813
    2  1           ellipse Ellipse_Height=0.0405 Ellipse_Width=1.35
  Chord along r/R (PCHIP): 0.2: 0.1, 0.6: 0.22, 1: 0.2
  Twist along r/R (PCHIP): 0.2: -46.75, 0.75: -20, 1: -13
  Thick along r/R (cubic Bezier): 0.2: 0.5, 0.233333: 0.3, 0.266667: 0.225, 0.3: 0.2, 0.4: 0.125, 0.5: 0.115, 0.6: 0.1, 0.733333: 0.075, 0.866667: 0.055, 1: 0.03
  CLI along r/R (cubic Bezier): 0.2: 0, 0.266667: 0.7, 0.333333: 0.7, 0.4: 0.7, 0.466667: 0.7, 0.533333: 0.7, 0.6: 0.7, 0.733333: 0.7, 0.866667: 0.7, 1: 0.2

Custom "Hub1", child of "Prop1"
  location (X Y Z) 40 -87 5, rotation -180 0 -180; relative location 40 -87 5, rotation 0 180 0
  bounding box size 3 3 3
  Design: Diameter=3 Height=3
  custom script Cone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

Propeller "Prop2"
  location (X Y Z) 40 -67 5, rotation 0 0 0
  bounding box size 0.736693 13.5396 12.3587
  Design: Diameter=13.5 NumBlade=6 Beta34=-20 UseBeta34Flag=1 Feather=0 Rotate=0 Precone=0 ReverseFlag=0 FoldAngle=0 PropMode=0 AF=168.52 CLi=0.538798 Chord=0.196667 Solidity=0.375606 ConstructXoC=0.5 FeatherAxisXoC=0.5 FeatherOffsetXoC=0
  cross sections:
    n  RadiusFrac  shape
    0  0.2         ellipse Ellipse_Height=0.3375 Ellipse_Width=0.675
    1  0.4         ellipse Ellipse_Height=0.172619 Ellipse_Width=1.19813
    2  1           ellipse Ellipse_Height=0.0405 Ellipse_Width=1.35
  blade curves as in "Prop1"

Custom "Hub2", child of "Prop2"
  location (X Y Z) 40 -67 5, rotation -180 0 -180; relative location 40 -67 5, rotation 0 180 0
  bounding box size 3 3 3
  Design: Diameter=3 Height=3
  custom script Cone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

Propeller "Prop3"
  location (X Y Z) 40 -47 5, rotation 0 0 0
  bounding box size 0.736693 13.5396 12.3587
  Design: Diameter=13.5 NumBlade=6 Beta34=-20 UseBeta34Flag=1 Feather=0 Rotate=0 Precone=0 ReverseFlag=0 FoldAngle=0 PropMode=0 AF=168.52 CLi=0.538798 Chord=0.196667 Solidity=0.375606 ConstructXoC=0.5 FeatherAxisXoC=0.5 FeatherOffsetXoC=0
  cross sections:
    n  RadiusFrac  shape
    0  0.2         ellipse Ellipse_Height=0.3375 Ellipse_Width=0.675
    1  0.4         ellipse Ellipse_Height=0.172619 Ellipse_Width=1.19813
    2  1           ellipse Ellipse_Height=0.0405 Ellipse_Width=1.35
  blade curves as in "Prop1"

Custom "Hub3", child of "Prop3"
  location (X Y Z) 40 -47 5, rotation -180 0 -180; relative location 40 -47 5, rotation 0 180 0
  bounding box size 3 3 3
  Design: Diameter=3 Height=3
  custom script Cone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

Propeller "Prop4"
  location (X Y Z) 40 -9 5, rotation 0 0 0
  bounding box size 0.736693 13.5396 12.3587
  Design: Diameter=13.5 NumBlade=6 Beta34=-20 UseBeta34Flag=1 Feather=0 Rotate=0 Precone=0 ReverseFlag=0 FoldAngle=0 PropMode=0 AF=168.52 CLi=0.538798 Chord=0.196667 Solidity=0.375606 ConstructXoC=0.5 FeatherAxisXoC=0.5 FeatherOffsetXoC=0
  cross sections:
    n  RadiusFrac  shape
    0  0.2         ellipse Ellipse_Height=0.3375 Ellipse_Width=0.675
    1  0.4         ellipse Ellipse_Height=0.172619 Ellipse_Width=1.19813
    2  1           ellipse Ellipse_Height=0.0405 Ellipse_Width=1.35
  blade curves as in "Prop1"

Custom "Hub4", child of "Prop4"
  location (X Y Z) 40 -9 5, rotation -180 0 -180; relative location 40 -9 5, rotation 0 180 0
  bounding box size 3 3 3
  Design: Diameter=3 Height=3
  custom script Cone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

Propeller "Prop5"
  location (X Y Z) 40 9 5, rotation 0 0 0
  bounding box size 0.736693 13.5396 12.3587
  Design: Diameter=13.5 NumBlade=6 Beta34=20 UseBeta34Flag=1 Feather=0 Rotate=0 Precone=0 ReverseFlag=0 FoldAngle=0 PropMode=0 AF=168.52 CLi=0.538798 Chord=0.196667 Solidity=0.375606 ConstructXoC=0.5 FeatherAxisXoC=0.5 FeatherOffsetXoC=0
  cross sections:
    n  RadiusFrac  shape
    0  0.2         ellipse Ellipse_Height=0.3375 Ellipse_Width=0.675
    1  0.4         ellipse Ellipse_Height=0.172619 Ellipse_Width=1.19813
    2  1           ellipse Ellipse_Height=0.0405 Ellipse_Width=1.35
  Chord along r/R (PCHIP): 0.2: 0.1, 0.6: 0.22, 1: 0.2
  Twist along r/R (PCHIP): 0.2: 46.75, 0.75: 20, 1: 13
  Thick along r/R (cubic Bezier): 0.2: 0.5, 0.233333: 0.3, 0.266667: 0.225, 0.3: 0.2, 0.4: 0.125, 0.5: 0.115, 0.6: 0.1, 0.733333: 0.075, 0.866667: 0.055, 1: 0.03
  CLI along r/R (cubic Bezier): 0.2: 0, 0.266667: 0.7, 0.333333: 0.7, 0.4: 0.7, 0.466667: 0.7, 0.533333: 0.7, 0.6: 0.7, 0.733333: 0.7, 0.866667: 0.7, 1: 0.2

Custom "Hub5", child of "Prop5"
  location (X Y Z) 40 9 5, rotation -180 0 -180; relative location 40 9 5, rotation 0 180 0
  bounding box size 3 3 3
  Design: Diameter=3 Height=3
  custom script Cone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

Propeller "Prop6"
  location (X Y Z) 40 47 5, rotation 0 0 0
  bounding box size 0.736693 13.5396 12.3587
  Design: Diameter=13.5 NumBlade=6 Beta34=20 UseBeta34Flag=1 Feather=0 Rotate=0 Precone=0 ReverseFlag=0 FoldAngle=0 PropMode=0 AF=168.52 CLi=0.538798 Chord=0.196667 Solidity=0.375606 ConstructXoC=0.5 FeatherAxisXoC=0.5 FeatherOffsetXoC=0
  cross sections:
    n  RadiusFrac  shape
    0  0.2         ellipse Ellipse_Height=0.3375 Ellipse_Width=0.675
    1  0.4         ellipse Ellipse_Height=0.172619 Ellipse_Width=1.19813
    2  1           ellipse Ellipse_Height=0.0405 Ellipse_Width=1.35
  blade curves as in "Prop5"

Custom "Hub6", child of "Prop6"
  location (X Y Z) 40 47 5, rotation -180 0 -180; relative location 40 47 5, rotation 0 180 0
  bounding box size 3 3 3
  Design: Diameter=3 Height=3
  custom script Cone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

Propeller "Prop7"
  location (X Y Z) 40 67 5, rotation 0 0 0
  bounding box size 0.736693 13.5396 12.3587
  Design: Diameter=13.5 NumBlade=6 Beta34=20 UseBeta34Flag=1 Feather=0 Rotate=0 Precone=0 ReverseFlag=0 FoldAngle=0 PropMode=0 AF=168.52 CLi=0.538798 Chord=0.196667 Solidity=0.375606 ConstructXoC=0.5 FeatherAxisXoC=0.5 FeatherOffsetXoC=0
  cross sections:
    n  RadiusFrac  shape
    0  0.2         ellipse Ellipse_Height=0.3375 Ellipse_Width=0.675
    1  0.4         ellipse Ellipse_Height=0.172619 Ellipse_Width=1.19813
    2  1           ellipse Ellipse_Height=0.0405 Ellipse_Width=1.35
  blade curves as in "Prop5"

Custom "Hub7", child of "Prop7"
  location (X Y Z) 40 67 5, rotation -180 0 -180; relative location 40 67 5, rotation 0 180 0
  bounding box size 3 3 3
  Design: Diameter=3 Height=3
  custom script Cone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

Propeller "Prop8"
  location (X Y Z) 40 87 5, rotation 0 0 0
  bounding box size 0.736693 13.5396 12.3587
  Design: Diameter=13.5 NumBlade=6 Beta34=20 UseBeta34Flag=1 Feather=0 Rotate=0 Precone=0 ReverseFlag=0 FoldAngle=0 PropMode=0 AF=168.52 CLi=0.538798 Chord=0.196667 Solidity=0.375606 ConstructXoC=0.5 FeatherAxisXoC=0.5 FeatherOffsetXoC=0
  cross sections:
    n  RadiusFrac  shape
    0  0.2         ellipse Ellipse_Height=0.3375 Ellipse_Width=0.675
    1  0.4         ellipse Ellipse_Height=0.172619 Ellipse_Width=1.19813
    2  1           ellipse Ellipse_Height=0.0405 Ellipse_Width=1.35
  blade curves as in "Prop5"

Custom "Hub8", child of "Prop8"
  location (X Y Z) 40 87 5, rotation -180 0 -180; relative location 40 87 5, rotation 0 180 0
  bounding box size 3 3 3
  Design: Diameter=3 Height=3
  custom script Cone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
