OpenVSP model (file version 5), 5 components.
Geometry view with OpenVSP parameter names; values to 6 digits, angles in degrees, lengths in the model's unit.
Overall bounding box: X_Min=-3.9722e-05 X_Len=0.50804 Y_Min=-1.016 Y_Len=2.032 Z_Min=-0.0508 Z_Len=0.1016

Wing "WingGeom"
  location (X Y Z) 0 0 0, rotation 0 0 0
  symmetric about XZ
  bounding box size 0.50804 2.032 0.0619373
  totals: TotalSpan=2.032 TotalProjectedSpan=2.032 TotalChord=0.508 TotalArea=1.03226 TotalAR=4
  root: chord 0.508, twist 0, airfoil file "CLARK Y AIRFOIL"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 BaseThickChord=0.117018 ThickChord=0.117018
  sections:
    n  Span   Root_Chord  Tip_Chord  Area      Sweep  Sweep_Location  Dihedral  Twist  Twist_Location  tip airfoil
    1  1.016  0.508       0.508      0.516128  0      0               0         0      0.25            as above

Fuselage "leftplate"
  location (X Y Z) 0 -1.016 0, rotation 0 0 0
  bounding box size 0.508 0 0.1016
  Design: Length=0.508
  cross sections:
    n  XLocPercent  YLocPercent  ZLocPercent  shape
    0  0            0            0            ellipse Ellipse_Height=0.1016 Ellipse_Width=0
    1  1            0            0            as above

Fuselage "rightplate"
  location (X Y Z) 0 1.016 0, rotation 0 0 0
  bounding box size 0.508 0 0.0508
  Design: Length=0.508
  cross sections:
    n  XLocPercent  YLocPercent  ZLocPercent  shape
    0  0            0            -0.05        ellipse Ellipse_Height=0.0508 Ellipse_Width=0
    1  1            0            -0.05        as above

Wing "testplateleft"
  location (X Y Z) 0 -1.016 -0.0508, rotation 0 0 0
  bounding box size 0.508 0 0.0508
  totals: TotalSpan=0.0508 TotalProjectedSpan=1e-06 TotalChord=0.508 TotalArea=0.0258064 TotalAR=0
  root: chord 0.508, twist 0, ellipse Ellipse_Height=0 Ellipse_Width=0.508
  sections:
    n  Span    Root_Chord  Tip_Chord  Area       Sweep  Sweep_Location  Dihedral  Twist  Twist_Location  tip airfoil
    1  0.0508  0.508       0.508      0.0258064  0      0               90        0      0.25            as above

Wing "testplateright"
  location (X Y Z) 0 1.016 -0.0508, rotation 0 0 0
  bounding box size 0.508 0 0.0508
  totals: TotalSpan=0.0508 TotalProjectedSpan=1e-06 TotalChord=0.508 TotalArea=0.0258064 TotalAR=0
  root: chord 0.508, twist 0, ellipse Ellipse_Height=0 Ellipse_Width=0.508
  sections:
    n  Span    Root_Chord  Tip_Chord  Area       Sweep  Sweep_Location  Dihedral  Twist  Twist_Location  tip airfoil
    1  0.0508  0.508       0.508      0.0258064  0      0               90        0      0.25            as above

VSPAERO settings: Sref=1.03226 bref=2.032 cref=0.508 Xcg=0 Ycg=0 Zcg=0 AlphaStart=-5 AlphaEnd=15 AlphaNpts=10 BetaStart=0 BetaEnd=0 BetaNpts=1 MachStart=0.2 MachEnd=0 MachNpts=1 ReCref=2.55e+06 Vinf=100 Rho=0.002377
